*Heading
** Nonlinear Rebar Model
** Generated by: Gabriel Gruber
*Preprint, echo=NO, model=NO, history=NO, contact=NO
**
** PARTS
**
*Part, name=IVD_L4L5
*Include, input=NodesRebar.inp
*Element, type=C3D20H
1,   150,  1168,  6691,  1048,     1,    43,   748,    92, 23824, 23823, 23822, 23821, 23825, 23826, 23827,
23828, 23830, 23829, 23831, 23832
2,  1168,  1169,  6692,  6691,    43,    44,   749,   748, 23835, 23834, 23833, 23823, 23836, 23837, 23838,
23826, 23829, 23839, 23840, 23831
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*Element, type=M3D4
21187,    26,   469,  3892,   722
21188,   469,   468,  3893,  3892
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*Elset, elset=NUCLEUS, generate
6381,  21186,      1
*Elset, elset=ANNULUS, generate
1,  6380,     1
*Elset, elset=AF-A, generate
5831,  6380,     1
*Elset, elset=AF-B
1816, 1817, 1818, 1819, 1820, 1821
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*Elset, elset=AF-C
881,  882,  883,  884,  885,  886
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*Elset, elset=AF-D
1,    2,    3,    4,    5,    6
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*Elset, elset=AF-E, generate
5116,  5830,     1
*Elset, elset=AF-A1
6051, 6052, 6053, 6054, 6055, 6056
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*Elset, elset=AF-A2
5996, 5997, 5998, 5999, 6000, 6001
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*Elset, elset=AF-A3
5941, 5942, 5943, 5944, 5945, 5946
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*Elset, elset=AF-A4
5886, 5887, 5888, 5889, 5890, 5891
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*Elset, elset=AF-A5
5831, 5832, 5833, 5834, 5835, 5836
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*Elset, elset=AF-B1
1816, 1817, 1818, 1819, 1820, 1821
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*Elset, elset=AF-B2
1970, 1971, 1972, 1973, 1974, 1975
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*Elset, elset=AF-B3
2124, 2125, 2126, 2127, 2128, 2129
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*Elset, elset=AF-B4
2278, 2279, 2280, 2281, 2282, 2283
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*Elset, elset=AF-B5
2432, 2433, 2434, 2435, 2436, 2437
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*Elset, elset=AF-C1
881,  882,  883,  884,  885,  886
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*Elset, elset=AF-C2
1068, 1069, 1070, 1071, 1072, 1073
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*Elset, elset=AF-C3
1255, 1256, 1257, 1258, 1259, 1260
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*Elset, elset=AF-C4
1442, 1443, 1444, 1445, 1446, 1447
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*Elset, elset=AF-C5
1629, 1630, 1631, 1632, 1633, 1634
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*Elset, elset=AF-D1
1,    2,    3,    4,    5,    6
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*Elset, elset=AF-D2
177,  178,  179,  180,  181,  182
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*Elset, elset=AF-D3
353,  354,  355,  356,  357,  358
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*Elset, elset=AF-D4
529,  530,  531,  532,  533,  534
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*Elset, elset=AF-D5
705,  706,  707,  708,  709,  710
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*Elset, elset=AF-E1
5380, 5381, 5382, 5383, 5384, 5385
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*Elset, elset=AF-E2
5314, 5315, 5316, 5317, 5318, 5319
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*Elset, elset=AF-E3
5248, 5249, 5250, 5251, 5252, 5253
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*Elset, elset=AF-E4
5182, 5183, 5184, 5185, 5186, 5187
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*Elset, elset=AF-E5
5116, 5117, 5118, 5119, 5120, 5121
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*Elset, elset=SKINAF-A1, generate
21187,  21296,      1
*Elset, elset=SKINAF-A2, generate
21297,  21406,      1
*Elset, elset=SKINAF-A3, generate
21407,  21516,      1
*Elset, elset=SKINAF-A4, generate
21517,  21626,      1
*Elset, elset=SKINAF-A5, generate
21627,  21736,      1
*Elset, elset=SKINAF-A6, generate
21737,  21846,      1
*Elset, elset=SKINAF-A7, generate
21847,  21956,      1
*Elset, elset=SKINAF-A8, generate
21957,  22066,      1
*Elset, elset=SKINAF-A9, generate
22067,  22176,      1
*Elset, elset=SKINAF-A10, generate
22177,  22286,      1
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*Elset, elset=SKINAF-E1, generate
32517,  32659,      1
*Elset, elset=SKINAF-E2, generate
32660,  32802,      1
*Elset, elset=SKINAF-E3, generate
32803,  32945,      1
*Elset, elset=SKINAF-E4, generate
32946,  33088,      1
*Elset, elset=SKINAF-E5, generate
33089,  33231,      1
*Elset, elset=SKINAF-E6, generate
33232,  33374,      1
*Elset, elset=SKINAF-E7, generate
33375,  33517,      1
*Elset, elset=SKINAF-E8, generate
33518,  33660,      1
*Elset, elset=SKINAF-E9, generate
33661,  33803,      1
*Elset, elset=SKINAF-E10, generate
33804,  33946,      1
*Elset, elset=SkinAF-B1_1, generate
22287, 22440, 1
*Elset, elset=SkinAF-B1_2, generate
22441, 22594, 1
*Elset, elset=SkinAF-B2_1, generate
22595, 22748, 1
*Elset, elset=SkinAF-B2_2, generate
22749, 22902, 1
*Elset, elset=SkinAF-B3_1, generate
22903, 23056, 1
*Elset, elset=SkinAF-B3_2, generate
23057, 23210, 1
*Elset, elset=SkinAF-B4_1, generate
23211, 23364, 1
*Elset, elset=SkinAF-B4_2, generate
23365, 23518, 1
*Elset, elset=SkinAF-B5_1, generate
23519, 23672, 1
*Elset, elset=SkinAF-B5_2, generate
23673, 23826, 1
*Elset, elset=SkinAF-B6_1, generate
23827, 23980, 1
*Elset, elset=SkinAF-B6_2, generate
23981, 24134, 1
*Elset, elset=SkinAF-B7_1, generate
24135, 24288, 1
*Elset, elset=SkinAF-B7_2, generate
24289, 24442, 1
*Elset, elset=SkinAF-B8_1, generate
24443, 24596, 1
*Elset, elset=SkinAF-B8_2, generate
24597, 24750, 1
*Elset, elset=SkinAF-B9_1, generate
24751, 24904, 1
*Elset, elset=SkinAF-B9_2, generate
24905, 25058, 1
*Elset, elset=SkinAF-B10_1, generate
25059, 25212, 1
*Elset, elset=SkinAF-B10_2, generate
25213, 25366, 1
*Elset, elset=SkinAF-C1_1, generate
25367, 25553, 1
*Elset, elset=SkinAF-C1_2, generate
25554, 25729, 1
*Elset, elset=SkinAF-C2_1, generate
25730, 25916, 1
*Elset, elset=SkinAF-C2_2, generate
25917, 26092, 1
*Elset, elset=SkinAF-C3_1, generate
26093, 26279, 1
*Elset, elset=SkinAF-C3_2, generate
26280, 26455, 1
*Elset, elset=SkinAF-C4_1, generate
26456, 26642, 1
*Elset, elset=SkinAF-C4_2, generate
26643, 26818, 1
*Elset, elset=SkinAF-C5_1, generate
26819, 27005, 1
*Elset, elset=SkinAF-C5_2, generate
27006, 27181, 1
*Elset, elset=SkinAF-C6_1, generate
27182, 27368, 1
*Elset, elset=SkinAF-C6_2, generate
27369, 27544, 1
*Elset, elset=SkinAF-C7_1, generate
27545, 27731, 1
*Elset, elset=SkinAF-C7_2, generate
27732, 27907, 1
*Elset, elset=SkinAF-C8_1, generate
27908, 28094, 1
*Elset, elset=SkinAF-C8_2, generate
28095, 28270, 1
*Elset, elset=SkinAF-C9_1, generate
28271, 28457, 1
*Elset, elset=SkinAF-C9_2, generate
28458, 28633, 1
*Elset, elset=SkinAF-C10_1, generate
28634, 28820, 1
*Elset, elset=SkinAF-C10_2, generate
28821, 28996, 1
*Elset, elset=SkinAF-D1_1, generate
28997, 29172, 1
*Elset, elset=SkinAF-D1_2, generate
29173, 29348, 1
*Elset, elset=SkinAF-D2_1, generate
29349, 29524, 1
*Elset, elset=SkinAF-D2_2, generate
29525, 29700, 1
*Elset, elset=SkinAF-D3_1, generate
29701, 29876, 1
*Elset, elset=SkinAF-D3_2, generate
29877, 30052, 1
*Elset, elset=SkinAF-D4_1, generate
30053, 30228, 1
*Elset, elset=SkinAF-D4_2, generate
30229, 30404, 1
*Elset, elset=SkinAF-D5_1, generate
30405, 30580, 1
*Elset, elset=SkinAF-D5_2, generate
30581, 30756, 1
*Elset, elset=SkinAF-D6_1, generate
30757, 30932, 1
*Elset, elset=SkinAF-D6_2, generate
30933, 31108, 1
*Elset, elset=SkinAF-D7_1, generate
31109, 31284, 1
*Elset, elset=SkinAF-D7_2, generate
31285, 31460, 1
*Elset, elset=SkinAF-D8_1, generate
31461, 31636, 1
*Elset, elset=SkinAF-D8_2, generate
31637, 31812, 1
*Elset, elset=SkinAF-D9_1, generate
31813, 31988, 1
*Elset, elset=SkinAF-D9_2, generate
31989, 32164, 1
*Elset, elset=SkinAF-D10_1, generate
32165, 32340, 1
*Elset, elset=SkinAF-D10_2, generate
32341, 32516, 1
*Elset, elset=_UpperSurface_S2, internal, generate
19841,  21186,      1
*Elset, elset=_UpperSurface_S4, internal
11,   22,   33,   44,   55,   66
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*Elset, elset=_UpperSurface_S6, internal
2586, 2597, 2608, 2619, 2630, 2641
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*Surface, type=ELEMENT, name=UpperSurface
_UpperSurface_S2, S2
_UpperSurface_S4, S4
_UpperSurface_S6, S6
*Elset, elset=_LowerSurface_S1, internal, generate
6381,  7726,     1
*Elset, elset=_LowerSurface_S4, internal
2596, 2607, 2618, 2629, 2640, 2651
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*Elset, elset=_LowerSurface_S6, internal
1,   12,   23,   34,   45,   56
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*Surface, type=ELEMENT, name=LowerSurface
_LowerSurface_S1, S1
_LowerSurface_S4, S4
_LowerSurface_S6, S6
** Section: Sec-AF-A1
*Solid Section, elset=AF-A1, material=Mat-Annulus
,
** Section: Sec-AF-A2
*Solid Section, elset=AF-A2, material=Mat-Annulus
,
** Section: Sec-AF-A3
*Solid Section, elset=AF-A3, material=Mat-Annulus
,
** Section: Sec-AF-A4
*Solid Section, elset=AF-A4, material=Mat-Annulus
,
** Section: Sec-AF-A5
*Solid Section, elset=AF-A5, material=Mat-Annulus
,
** Section: Sec-AF-B1
*Solid Section, elset=AF-B1, material=Mat-Annulus
,
** Section: Sec-AF-B2
*Solid Section, elset=AF-B2, material=Mat-Annulus
,
** Section: Sec-AF-B3
*Solid Section, elset=AF-B3, material=Mat-Annulus
,
** Section: Sec-AF-B4
*Solid Section, elset=AF-B4, material=Mat-Annulus
,
** Section: Sec-AF-B5
*Solid Section, elset=AF-B5, material=Mat-Annulus
,
** Section: Sec-AF-C1
*Solid Section, elset=AF-C1, material=Mat-Annulus
,
** Section: Sec-AF-C2
*Solid Section, elset=AF-C2, material=Mat-Annulus
,
** Section: Sec-AF-C3
*Solid Section, elset=AF-C3, material=Mat-Annulus
,
** Section: Sec-AF-C4
*Solid Section, elset=AF-C4, material=Mat-Annulus
,
** Section: Sec-AF-C5
*Solid Section, elset=AF-C5, material=Mat-Annulus
,
** Section: Sec-AF-D1
*Solid Section, elset=AF-D1, material=Mat-Annulus
,
** Section: Sec-AF-D2
*Solid Section, elset=AF-D2, material=Mat-Annulus
,
** Section: Sec-AF-D3
*Solid Section, elset=AF-D3, material=Mat-Annulus
,
** Section: Sec-AF-D4
*Solid Section, elset=AF-D4, material=Mat-Annulus
,
** Section: Sec-AF-D5
*Solid Section, elset=AF-D5, material=Mat-Annulus
,
** Section: Sec-AF-E1
*Solid Section, elset=AF-E1, material=Mat-Annulus
,
** Section: Sec-AF-E2
*Solid Section, elset=AF-E2, material=Mat-Annulus
,
** Section: Sec-AF-E3
*Solid Section, elset=AF-E3, material=Mat-Annulus
,
** Section: Sec-AF-E4
*Solid Section, elset=AF-E4, material=Mat-Annulus
,
** Section: Sec-AF-E5
*Solid Section, elset=AF-E5, material=Mat-Annulus
,
** Section: Sec-Nucleus
*Solid Section, elset=Nucleus, material=Mat-Nucleus
,
*Orientation, name=RebarOri, system=CYLINDRICAL
57.93, -87.5, 17.62, 57.97, -86.57, 17.98
1, 0.
** Section: Sec-AF-A1_fibres
*Membrane Section, elset=SkinAF-A1, material=Mat-Annulus
0.14,
*Rebar Layer, orientation=RebarOri
*Include, input=.\MAT\NonlinRebar\MaterialParametersAnnulusRegionA1L4L5_FiberAngle.inp
** Section: Sec-AF-A2_fibres
*Membrane Section, elset=SkinAF-A2, material=Mat-Annulus
0.14,
*Rebar Layer, orientation=RebarOri
*Include, input=.\MAT\NonlinRebar\MaterialParametersAnnulusRegionA2L4L5_FiberAngle.inp
** Section: Sec-AF-A3_fibres
*Membrane Section, elset=SkinAF-A3, material=Mat-Annulus
0.14,
*Rebar Layer, orientation=RebarOri
*Include, input=.\MAT\NonlinRebar\MaterialParametersAnnulusRegionA3L4L5_FiberAngle.inp
** Section: Sec-AF-A4_fibres
*Membrane Section, elset=SkinAF-A4, material=Mat-Annulus
0.18,
*Rebar Layer, orientation=RebarOri
*Include, input=.\MAT\NonlinRebar\MaterialParametersAnnulusRegionA4L4L5_FiberAngle.inp
** Section: Sec-AF-A5_fibres
*Membrane Section, elset=SkinAF-A5, material=Mat-Annulus
0.18,
*Rebar Layer, orientation=RebarOri
*Include, input=.\MAT\NonlinRebar\MaterialParametersAnnulusRegionA5L4L5_FiberAngle.inp
** Section: Sec-AF-A6_fibres
*Membrane Section, elset=SkinAF-A6, material=Mat-Annulus
0.18,
*Rebar Layer, orientation=RebarOri
*Include, input=.\MAT\NonlinRebar\MaterialParametersAnnulusRegionA6L4L5_FiberAngle.inp
** Section: Sec-AF-A7_fibres
*Membrane Section, elset=SkinAF-A7, material=Mat-Annulus
0.18,
*Rebar Layer, orientation=RebarOri
*Include, input=.\MAT\NonlinRebar\MaterialParametersAnnulusRegionA7L4L5_FiberAngle.inp
** Section: Sec-AF-A8_fibres
*Membrane Section, elset=SkinAF-A8, material=Mat-Annulus
0.23,
*Rebar Layer, orientation=RebarOri
*Include, input=.\MAT\NonlinRebar\MaterialParametersAnnulusRegionA8L4L5_FiberAngle.inp
** Section: Sec-AF-A9_fibres
*Membrane Section, elset=SkinAF-A9, material=Mat-Annulus
0.23,
*Rebar Layer, orientation=RebarOri
*Include, input=.\MAT\NonlinRebar\MaterialParametersAnnulusRegionA9L4L5_FiberAngle.inp
** Section: Sec-AF-A10_fibres
*Membrane Section, elset=SkinAF-A10, material=Mat-Annulus
0.23,
*Rebar Layer, orientation=RebarOri
*Include, input=.\MAT\NonlinRebar\MaterialParametersAnnulusRegionA10L4L5_FiberAngle.inp
** Section: Sec-AF-B1_1_fibres
*Membrane Section, elset=SkinAF-B1_1, material=Mat-Annulus
0.15,
*Rebar Layer, orientation=RebarOri
*Include, input=.\MAT\NonlinRebar\MaterialParametersAnnulusRegionB1L4L5_FiberAngle.inp
** Section: Sec-AF-B1_2_fibres
*Membrane Section, elset=SkinAF-B1_2, material=Mat-Annulus
0.15,
*Rebar Layer, orientation=RebarOri
*Include, input=.\MAT\NonlinRebar\MaterialParametersAnnulusRegionB1L4L5_FiberAngle.inp
** Section: Sec-AF-B2_1_fibres
*Membrane Section, elset=SkinAF-B2_1, material=Mat-Annulus
0.15,
*Rebar Layer, orientation=RebarOri
*Include, input=.\MAT\NonlinRebar\MaterialParametersAnnulusRegionB2L4L5_FiberAngle.inp
** Section: Sec-AF-B2_2_fibres
*Membrane Section, elset=SkinAF-B2_2, material=Mat-Annulus
0.15,
*Rebar Layer, orientation=RebarOri
*Include, input=.\MAT\NonlinRebar\MaterialParametersAnnulusRegionB2L4L5_FiberAngle.inp
** Section: Sec-AF-B3_1_fibres
*Membrane Section, elset=SkinAF-B3_1, material=Mat-Annulus
0.15,
*Rebar Layer, orientation=RebarOri
*Include, input=.\MAT\NonlinRebar\MaterialParametersAnnulusRegionB3L4L5_FiberAngle.inp
** Section: Sec-AF-B3_2_fibres
*Membrane Section, elset=SkinAF-B3_2, material=Mat-Annulus
0.15,
*Rebar Layer, orientation=RebarOri
*Include, input=.\MAT\NonlinRebar\MaterialParametersAnnulusRegionB3L4L5_FiberAngle.inp
** Section: Sec-AF-B4_1_fibres
*Membrane Section, elset=SkinAF-B4_1, material=Mat-Annulus
0.15,
*Rebar Layer, orientation=RebarOri
*Include, input=.\MAT\NonlinRebar\MaterialParametersAnnulusRegionB4L4L5_FiberAngle.inp
** Section: Sec-AF-B4_2_fibres
*Membrane Section, elset=SkinAF-B4_2, material=Mat-Annulus
0.15,
*Rebar Layer, orientation=RebarOri
*Include, input=.\MAT\NonlinRebar\MaterialParametersAnnulusRegionB4L4L5_FiberAngle.inp
** Section: Sec-AF-B5_1_fibres
*Membrane Section, elset=SkinAF-B5_1, material=Mat-Annulus
0.15,
*Rebar Layer, orientation=RebarOri
*Include, input=.\MAT\NonlinRebar\MaterialParametersAnnulusRegionB5L4L5_FiberAngle.inp
** Section: Sec-AF-B5_2_fibres
*Membrane Section, elset=SkinAF-B5_2, material=Mat-Annulus
0.15,
*Rebar Layer, orientation=RebarOri
*Include, input=.\MAT\NonlinRebar\MaterialParametersAnnulusRegionB5L4L5_FiberAngle.inp
** Section: Sec-AF-B6_1_fibres
*Membrane Section, elset=SkinAF-B6_1, material=Mat-Annulus
0.15,
*Rebar Layer, orientation=RebarOri
*Include, input=.\MAT\NonlinRebar\MaterialParametersAnnulusRegionB6L4L5_FiberAngle.inp
** Section: Sec-AF-B6_2_fibres
*Membrane Section, elset=SkinAF-B6_2, material=Mat-Annulus
0.15,
*Rebar Layer, orientation=RebarOri
*Include, input=.\MAT\NonlinRebar\MaterialParametersAnnulusRegionB6L4L5_FiberAngle.inp
** Section: Sec-AF-B7_1_fibres
*Membrane Section, elset=SkinAF-B7_1, material=Mat-Annulus
0.15,
*Rebar Layer, orientation=RebarOri
*Include, input=.\MAT\NonlinRebar\MaterialParametersAnnulusRegionB7L4L5_FiberAngle.inp
** Section: Sec-AF-B7_2_fibres
*Membrane Section, elset=SkinAF-B7_2, material=Mat-Annulus
0.15,
*Rebar Layer, orientation=RebarOri
*Include, input=.\MAT\NonlinRebar\MaterialParametersAnnulusRegionB7L4L5_FiberAngle.inp
** Section: Sec-AF-B8_1_fibres
*Membrane Section, elset=SkinAF-B8_1, material=Mat-Annulus
0.19,
*Rebar Layer, orientation=RebarOri
*Include, input=.\MAT\NonlinRebar\MaterialParametersAnnulusRegionB8L4L5_FiberAngle.inp
** Section: Sec-AF-B8_2_fibres
*Membrane Section, elset=SkinAF-B8_2, material=Mat-Annulus
0.19,
*Rebar Layer, orientation=RebarOri
*Include, input=.\MAT\NonlinRebar\MaterialParametersAnnulusRegionB8L4L5_FiberAngle.inp
** Section: Sec-AF-B9_1_fibres
*Membrane Section, elset=SkinAF-B9_1, material=Mat-Annulus
0.19,
*Rebar Layer, orientation=RebarOri
*Include, input=.\MAT\NonlinRebar\MaterialParametersAnnulusRegionB9L4L5_FiberAngle.inp
** Section: Sec-AF-B9_2_fibres
*Membrane Section, elset=SkinAF-B9_2, material=Mat-Annulus
0.19,
*Rebar Layer, orientation=RebarOri
*Include, input=.\MAT\NonlinRebar\MaterialParametersAnnulusRegionB9L4L5_FiberAngle.inp
** Section: Sec-AF-B10_1_fibres
*Membrane Section, elset=SkinAF-B10_1, material=Mat-Annulus
0.19,
*Rebar Layer, orientation=RebarOri
*Include, input=.\MAT\NonlinRebar\MaterialParametersAnnulusRegionB10L4L5_FiberAngle.inp
** Section: Sec-AF-B10_2_fibres
*Membrane Section, elset=SkinAF-B10_2, material=Mat-Annulus
0.19,
*Rebar Layer, orientation=RebarOri
*Include, input=.\MAT\NonlinRebar\MaterialParametersAnnulusRegionB10L4L5_FiberAngle.inp
** Section: Sec-AF-C1_1_fibres
*Membrane Section, elset=SkinAF-C1_1, material=Mat-Annulus
0.15,
*Rebar Layer, orientation=RebarOri
*Include, input=.\MAT\NonlinRebar\MaterialParametersAnnulusRegionC1L4L5_FiberAngle.inp
** Section: Sec-AF-C1_2_fibres
*Membrane Section, elset=SkinAF-C1_2, material=Mat-Annulus
0.15,
*Rebar Layer, orientation=RebarOri
*Include, input=.\MAT\NonlinRebar\MaterialParametersAnnulusRegionC1L4L5_FiberAngle.inp
** Section: Sec-AF-C2_1_fibres
*Membrane Section, elset=SkinAF-C2_1, material=Mat-Annulus
0.15,
*Rebar Layer, orientation=RebarOri
*Include, input=.\MAT\NonlinRebar\MaterialParametersAnnulusRegionC2L4L5_FiberAngle.inp
** Section: Sec-AF-C2_2_fibres
*Membrane Section, elset=SkinAF-C2_2, material=Mat-Annulus
0.15,
*Rebar Layer, orientation=RebarOri
*Include, input=.\MAT\NonlinRebar\MaterialParametersAnnulusRegionC2L4L5_FiberAngle.inp
** Section: Sec-AF-C3_1_fibres
*Membrane Section, elset=SkinAF-C3_1, material=Mat-Annulus
0.15,
*Rebar Layer, orientation=RebarOri
*Include, input=.\MAT\NonlinRebar\MaterialParametersAnnulusRegionC3L4L5_FiberAngle.inp
** Section: Sec-AF-C3_2_fibres
*Membrane Section, elset=SkinAF-C3_2, material=Mat-Annulus
0.15,
*Rebar Layer, orientation=RebarOri
*Include, input=.\MAT\NonlinRebar\MaterialParametersAnnulusRegionC3L4L5_FiberAngle.inp
** Section: Sec-AF-C4_1_fibres
*Membrane Section, elset=SkinAF-C4_1, material=Mat-Annulus
0.15,
*Rebar Layer, orientation=RebarOri
*Include, input=.\MAT\NonlinRebar\MaterialParametersAnnulusRegionC4L4L5_FiberAngle.inp
** Section: Sec-AF-C4_2_fibres
*Membrane Section, elset=SkinAF-C4_2, material=Mat-Annulus
0.15,
*Rebar Layer, orientation=RebarOri
*Include, input=.\MAT\NonlinRebar\MaterialParametersAnnulusRegionC4L4L5_FiberAngle.inp
** Section: Sec-AF-C5_1_fibres
*Membrane Section, elset=SkinAF-C5_1, material=Mat-Annulus
0.15,
*Rebar Layer, orientation=RebarOri
*Include, input=.\MAT\NonlinRebar\MaterialParametersAnnulusRegionC5L4L5_FiberAngle.inp
** Section: Sec-AF-C5_2_fibres
*Membrane Section, elset=SkinAF-C5_2, material=Mat-Annulus
0.15,
*Rebar Layer, orientation=RebarOri
*Include, input=.\MAT\NonlinRebar\MaterialParametersAnnulusRegionC5L4L5_FiberAngle.inp
** Section: Sec-AF-C6_1_fibres
*Membrane Section, elset=SkinAF-C6_1, material=Mat-Annulus
0.15,
*Rebar Layer, orientation=RebarOri
*Include, input=.\MAT\NonlinRebar\MaterialParametersAnnulusRegionC6L4L5_FiberAngle.inp
** Section: Sec-AF-C6_2_fibres
*Membrane Section, elset=SkinAF-C6_2, material=Mat-Annulus
0.15,
*Rebar Layer, orientation=RebarOri
*Include, input=.\MAT\NonlinRebar\MaterialParametersAnnulusRegionC6L4L5_FiberAngle.inp
** Section: Sec-AF-C7_1_fibres
*Membrane Section, elset=SkinAF-C7_1, material=Mat-Annulus
0.15,
*Rebar Layer, orientation=RebarOri
*Include, input=.\MAT\NonlinRebar\MaterialParametersAnnulusRegionC7L4L5_FiberAngle.inp
** Section: Sec-AF-C7_2_fibres
*Membrane Section, elset=SkinAF-C7_2, material=Mat-Annulus
0.15,
*Rebar Layer, orientation=RebarOri
*Include, input=.\MAT\NonlinRebar\MaterialParametersAnnulusRegionC7L4L5_FiberAngle.inp
** Section: Sec-AF-C8_1_fibres
*Membrane Section, elset=SkinAF-C8_1, material=Mat-Annulus
0.19,
*Rebar Layer, orientation=RebarOri
*Include, input=.\MAT\NonlinRebar\MaterialParametersAnnulusRegionC8L4L5_FiberAngle.inp
** Section: Sec-AF-C8_2_fibres
*Membrane Section, elset=SkinAF-C8_2, material=Mat-Annulus
0.19,
*Rebar Layer, orientation=RebarOri
*Include, input=.\MAT\NonlinRebar\MaterialParametersAnnulusRegionC8L4L5_FiberAngle.inp
** Section: Sec-AF-C9_1_fibres
*Membrane Section, elset=SkinAF-C9_1, material=Mat-Annulus
0.19,
*Rebar Layer, orientation=RebarOri
*Include, input=.\MAT\NonlinRebar\MaterialParametersAnnulusRegionC9L4L5_FiberAngle.inp
** Section: Sec-AF-C9_2_fibres
*Membrane Section, elset=SkinAF-C9_2, material=Mat-Annulus
0.19,
*Rebar Layer, orientation=RebarOri
*Include, input=.\MAT\NonlinRebar\MaterialParametersAnnulusRegionC9L4L5_FiberAngle.inp
** Section: Sec-AF-C10_1_fibres
*Membrane Section, elset=SkinAF-C10_1, material=Mat-Annulus
0.19,
*Rebar Layer, orientation=RebarOri
*Include, input=.\MAT\NonlinRebar\MaterialParametersAnnulusRegionC10L4L5_FiberAngle.inp
** Section: Sec-AF-C10_2_fibres
*Membrane Section, elset=SkinAF-C10_2, material=Mat-Annulus
0.19,
*Rebar Layer, orientation=RebarOri
*Include, input=.\MAT\NonlinRebar\MaterialParametersAnnulusRegionC10L4L5_FiberAngle.inp
** Section: Sec-AF-D1_1_fibres
*Membrane Section, elset=SkinAF-D1_1, material=Mat-Annulus
0.16,
*Rebar Layer, orientation=RebarOri
*Include, input=.\MAT\NonlinRebar\MaterialParametersAnnulusRegionD1L4L5_FiberAngle.inp
** Section: Sec-AF-D1_2_fibres
*Membrane Section, elset=SkinAF-D1_2, material=Mat-Annulus
0.16,
*Rebar Layer, orientation=RebarOri
*Include, input=.\MAT\NonlinRebar\MaterialParametersAnnulusRegionD1L4L5_FiberAngle.inp
** Section: Sec-AF-D2_1_fibres
*Membrane Section, elset=SkinAF-D2_1, material=Mat-Annulus
0.16,
*Rebar Layer, orientation=RebarOri
*Include, input=.\MAT\NonlinRebar\MaterialParametersAnnulusRegionD2L4L5_FiberAngle.inp
** Section: Sec-AF-D2_2_fibres
*Membrane Section, elset=SkinAF-D2_2, material=Mat-Annulus
0.16,
*Rebar Layer, orientation=RebarOri
*Include, input=.\MAT\NonlinRebar\MaterialParametersAnnulusRegionD2L4L5_FiberAngle.inp
** Section: Sec-AF-D3_1_fibres
*Membrane Section, elset=SkinAF-D3_1, material=Mat-Annulus
0.16,
*Rebar Layer, orientation=RebarOri
*Include, input=.\MAT\NonlinRebar\MaterialParametersAnnulusRegionD3L4L5_FiberAngle.inp
** Section: Sec-AF-D3_2_fibres
*Membrane Section, elset=SkinAF-D3_2, material=Mat-Annulus
0.16,
*Rebar Layer, orientation=RebarOri
*Include, input=.\MAT\NonlinRebar\MaterialParametersAnnulusRegionD3L4L5_FiberAngle.inp
** Section: Sec-AF-D4_1_fibres
*Membrane Section, elset=SkinAF-D4_1, material=Mat-Annulus
0.15,
*Rebar Layer, orientation=RebarOri
*Include, input=.\MAT\NonlinRebar\MaterialParametersAnnulusRegionD4L4L5_FiberAngle.inp
** Section: Sec-AF-D4_2_fibres
*Membrane Section, elset=SkinAF-D4_2, material=Mat-Annulus
0.15,
*Rebar Layer, orientation=RebarOri
*Include, input=.\MAT\NonlinRebar\MaterialParametersAnnulusRegionD4L4L5_FiberAngle.inp
** Section: Sec-AF-D5_1_fibres
*Membrane Section, elset=SkinAF-D5_1, material=Mat-Annulus
0.15,
*Rebar Layer, orientation=RebarOri
*Include, input=.\MAT\NonlinRebar\MaterialParametersAnnulusRegionD5L4L5_FiberAngle.inp
** Section: Sec-AF-D5_2_fibres
*Membrane Section, elset=SkinAF-D5_2, material=Mat-Annulus
0.15,
*Rebar Layer, orientation=RebarOri
*Include, input=.\MAT\NonlinRebar\MaterialParametersAnnulusRegionD5L4L5_FiberAngle.inp
** Section: Sec-AF-D6_1_fibres
*Membrane Section, elset=SkinAF-D6_1, material=Mat-Annulus
0.15,
*Rebar Layer, orientation=RebarOri
*Include, input=.\MAT\NonlinRebar\MaterialParametersAnnulusRegionD6L4L5_FiberAngle.inp
** Section: Sec-AF-D6_2_fibres
*Membrane Section, elset=SkinAF-D6_2, material=Mat-Annulus
0.15,
*Rebar Layer, orientation=RebarOri
*Include, input=.\MAT\NonlinRebar\MaterialParametersAnnulusRegionD6L4L5_FiberAngle.inp
** Section: Sec-AF-D7_1_fibres
*Membrane Section, elset=SkinAF-D7_1, material=Mat-Annulus
0.15,
*Rebar Layer, orientation=RebarOri
*Include, input=.\MAT\NonlinRebar\MaterialParametersAnnulusRegionD7L4L5_FiberAngle.inp
** Section: Sec-AF-D7_2_fibres
*Membrane Section, elset=SkinAF-D7_2, material=Mat-Annulus
0.15,
*Rebar Layer, orientation=RebarOri
*Include, input=.\MAT\NonlinRebar\MaterialParametersAnnulusRegionD7L4L5_FiberAngle.inp
** Section: Sec-AF-D8_1_fibres
*Membrane Section, elset=SkinAF-D8_1, material=Mat-Annulus
0.2,
*Rebar Layer, orientation=RebarOri
*Include, input=.\MAT\NonlinRebar\MaterialParametersAnnulusRegionD8L4L5_FiberAngle.inp
** Section: Sec-AF-D8_2_fibres
*Membrane Section, elset=SkinAF-D8_2, material=Mat-Annulus
0.2,
*Rebar Layer, orientation=RebarOri
*Include, input=.\MAT\NonlinRebar\MaterialParametersAnnulusRegionD8L4L5_FiberAngle.inp
** Section: Sec-AF-D9_1_fibres
*Membrane Section, elset=SkinAF-D9_1, material=Mat-Annulus
0.2,
*Rebar Layer, orientation=RebarOri
*Include, input=.\MAT\NonlinRebar\MaterialParametersAnnulusRegionD9L4L5_FiberAngle.inp
** Section: Sec-AF-D9_2_fibres
*Membrane Section, elset=SkinAF-D9_2, material=Mat-Annulus
0.2,
*Rebar Layer, orientation=RebarOri
*Include, input=.\MAT\NonlinRebar\MaterialParametersAnnulusRegionD9L4L5_FiberAngle.inp
** Section: Sec-AF-D10_1_fibres
*Membrane Section, elset=SkinAF-D10_1, material=Mat-Annulus
0.2,
*Rebar Layer, orientation=RebarOri
*Include, input=.\MAT\NonlinRebar\MaterialParametersAnnulusRegionD10L4L5_FiberAngle.inp
** Section: Sec-AF-D10_2_fibres
*Membrane Section, elset=SkinAF-D10_2, material=Mat-Annulus
0.2,
*Rebar Layer, orientation=RebarOri
*Include, input=.\MAT\NonlinRebar\MaterialParametersAnnulusRegionD10L4L5_FiberAngle.inp
** Section: Sec-AF-E1_fibres
*Membrane Section, elset=SkinAF-E1, material=Mat-Annulus
0.11,
*Rebar Layer, orientation=RebarOri
*Include, input=.\MAT\NonlinRebar\MaterialParametersAnnulusRegionE1L4L5_FiberAngle.inp
** Section: Sec-AF-E2_fibres
*Membrane Section, elset=SkinAF-E2, material=Mat-Annulus
0.11,
*Rebar Layer, orientation=RebarOri
*Include, input=.\MAT\NonlinRebar\MaterialParametersAnnulusRegionE2L4L5_FiberAngle.inp
** Section: Sec-AF-E3_fibres
*Membrane Section, elset=SkinAF-E3, material=Mat-Annulus
0.11,
*Rebar Layer, orientation=RebarOri
*Include, input=.\MAT\NonlinRebar\MaterialParametersAnnulusRegionE3L4L5_FiberAngle.inp
** Section: Sec-AF-E4_fibres
*Membrane Section, elset=SkinAF-E4, material=Mat-Annulus
0.18,
*Rebar Layer, orientation=RebarOri
*Include, input=.\MAT\NonlinRebar\MaterialParametersAnnulusRegionE4L4L5_FiberAngle.inp
** Section: Sec-AF-E5_fibres
*Membrane Section, elset=SkinAF-E5, material=Mat-Annulus
0.18,
*Rebar Layer, orientation=RebarOri
*Include, input=.\MAT\NonlinRebar\MaterialParametersAnnulusRegionE5L4L5_FiberAngle.inp
** Section: Sec-AF-E6_fibres
*Membrane Section, elset=SkinAF-E6, material=Mat-Annulus
0.18,
*Rebar Layer, orientation=RebarOri
*Include, input=.\MAT\NonlinRebar\MaterialParametersAnnulusRegionE6L4L5_FiberAngle.inp
** Section: Sec-AF-E7_fibres
*Membrane Section, elset=SkinAF-E7, material=Mat-Annulus
0.18,
*Rebar Layer, orientation=RebarOri
*Include, input=.\MAT\NonlinRebar\MaterialParametersAnnulusRegionE7L4L5_FiberAngle.inp
** Section: Sec-AF-E8_fibres
*Membrane Section, elset=SkinAF-E8, material=Mat-Annulus
0.2,
*Rebar Layer, orientation=RebarOri
*Include, input=.\MAT\NonlinRebar\MaterialParametersAnnulusRegionE8L4L5_FiberAngle.inp
** Section: Sec-AF-E9_fibres
*Membrane Section, elset=SkinAF-E9, material=Mat-Annulus
0.2,
*Rebar Layer, orientation=RebarOri
*Include, input=.\MAT\NonlinRebar\MaterialParametersAnnulusRegionE9L4L5_FiberAngle.inp
** Section: Sec-AF-E10_fibres
*Membrane Section, elset=SkinAF-E10, material=Mat-Annulus
0.2,
*Rebar Layer, orientation=RebarOri
*Include, input=.\MAT\NonlinRebar\MaterialParametersAnnulusRegionE10L4L5_FiberAngle.inp
*End Part
**
**
** ASSEMBLY
**
*Assembly, name=Assembly
**
*Instance, name=IVD_L4L5, part=IVD_L4L5
*End Instance
**
*Include, input = ReferencePoints.inp
*Elset, elset=NP-Center, instance=IVD_L4L5
 13051,
** Constraint: Coupling-1
*Coupling, constraint name=Coupling-Load, ref node=RP-Load, surface=IVD_L4L5.UpperSurface
*Kinematic
** Constraint: Coupling-2
*Coupling, constraint name=Coupling-Encastre, ref node=RP-Encastre, surface=IVD_L4L5.LowerSurface
*Kinematic
*End Assembly
**
** MATERIALS
**
*Material, name=Mat-AF-A1_Fibers
*Density
*Include, input=.\MAT\NonlinRebar\MaterialDensity.inp
*Include, input=.\MAT\NonlinRebar\MaterialParametersAnnulusRegionA1L4L5_Fibers.inp
*Material, name=Mat-AF-A2_Fibers
*Density
*Include, input=.\MAT\NonlinRebar\MaterialDensity.inp
*Include, input=.\MAT\NonlinRebar\MaterialParametersAnnulusRegionA2L4L5_Fibers.inp
*Material, name=Mat-AF-A3_Fibers
*Density
*Include, input=.\MAT\NonlinRebar\MaterialDensity.inp
*Include, input=.\MAT\NonlinRebar\MaterialParametersAnnulusRegionA3L4L5_Fibers.inp
*Material, name=Mat-AF-A4_Fibers
*Density
*Include, input=.\MAT\NonlinRebar\MaterialDensity.inp
*Include, input=.\MAT\NonlinRebar\MaterialParametersAnnulusRegionA4L4L5_Fibers.inp
*Material, name=Mat-AF-A5_Fibers
*Density
*Include, input=.\MAT\NonlinRebar\MaterialDensity.inp
*Include, input=.\MAT\NonlinRebar\MaterialParametersAnnulusRegionA5L4L5_Fibers.inp
*Material, name=Mat-AF-A6_Fibers
*Density
*Include, input=.\MAT\NonlinRebar\MaterialDensity.inp
*Include, input=.\MAT\NonlinRebar\MaterialParametersAnnulusRegionA6L4L5_Fibers.inp
*Material, name=Mat-AF-A7_Fibers
*Density
*Include, input=.\MAT\NonlinRebar\MaterialDensity.inp
*Include, input=.\MAT\NonlinRebar\MaterialParametersAnnulusRegionA7L4L5_Fibers.inp
*Material, name=Mat-AF-A8_Fibers
*Density
*Include, input=.\MAT\NonlinRebar\MaterialDensity.inp
*Include, input=.\MAT\NonlinRebar\MaterialParametersAnnulusRegionA8L4L5_Fibers.inp
*Material, name=Mat-AF-A9_Fibers
*Density
*Include, input=.\MAT\NonlinRebar\MaterialDensity.inp
*Include, input=.\MAT\NonlinRebar\MaterialParametersAnnulusRegionA9L4L5_Fibers.inp
*Material, name=Mat-AF-A10_Fibers
*Density
*Include, input=.\MAT\NonlinRebar\MaterialDensity.inp
*Include, input=.\MAT\NonlinRebar\MaterialParametersAnnulusRegionA10L4L5_Fibers.inp
*Material, name=Mat-AF-B1_Fibers
*Density
*Include, input=.\MAT\NonlinRebar\MaterialDensity.inp
*Include, input=.\MAT\NonlinRebar\MaterialParametersAnnulusRegionB1L4L5_Fibers.inp
*Material, name=Mat-AF-B2_Fibers
*Density
*Include, input=.\MAT\NonlinRebar\MaterialDensity.inp
*Include, input=.\MAT\NonlinRebar\MaterialParametersAnnulusRegionB2L4L5_Fibers.inp
*Material, name=Mat-AF-B3_Fibers
*Density
*Include, input=.\MAT\NonlinRebar\MaterialDensity.inp
*Include, input=.\MAT\NonlinRebar\MaterialParametersAnnulusRegionB3L4L5_Fibers.inp
*Material, name=Mat-AF-B4_Fibers
*Density
*Include, input=.\MAT\NonlinRebar\MaterialDensity.inp
*Include, input=.\MAT\NonlinRebar\MaterialParametersAnnulusRegionB4L4L5_Fibers.inp
*Material, name=Mat-AF-B5_Fibers
*Density
*Include, input=.\MAT\NonlinRebar\MaterialDensity.inp
*Include, input=.\MAT\NonlinRebar\MaterialParametersAnnulusRegionB5L4L5_Fibers.inp
*Material, name=Mat-AF-B6_Fibers
*Density
*Include, input=.\MAT\NonlinRebar\MaterialDensity.inp
*Include, input=.\MAT\NonlinRebar\MaterialParametersAnnulusRegionB6L4L5_Fibers.inp
*Material, name=Mat-AF-B7_Fibers
*Density
*Include, input=.\MAT\NonlinRebar\MaterialDensity.inp
*Include, input=.\MAT\NonlinRebar\MaterialParametersAnnulusRegionB7L4L5_Fibers.inp
*Material, name=Mat-AF-B8_Fibers
*Density
*Include, input=.\MAT\NonlinRebar\MaterialDensity.inp
*Include, input=.\MAT\NonlinRebar\MaterialParametersAnnulusRegionB8L4L5_Fibers.inp
*Material, name=Mat-AF-B9_Fibers
*Density
*Include, input=.\MAT\NonlinRebar\MaterialDensity.inp
*Include, input=.\MAT\NonlinRebar\MaterialParametersAnnulusRegionB9L4L5_Fibers.inp
*Material, name=Mat-AF-B10_Fibers
*Density
*Include, input=.\MAT\NonlinRebar\MaterialDensity.inp
*Include, input=.\MAT\NonlinRebar\MaterialParametersAnnulusRegionB10L4L5_Fibers.inp
*Material, name=Mat-AF-C1_Fibers
*Density
*Include, input=.\MAT\NonlinRebar\MaterialDensity.inp
*Include, input=.\MAT\NonlinRebar\MaterialParametersAnnulusRegionC1L4L5_Fibers.inp
*Material, name=Mat-AF-C2_Fibers
*Density
*Include, input=.\MAT\NonlinRebar\MaterialDensity.inp
*Include, input=.\MAT\NonlinRebar\MaterialParametersAnnulusRegionC2L4L5_Fibers.inp
*Material, name=Mat-AF-C3_Fibers
*Density
*Include, input=.\MAT\NonlinRebar\MaterialDensity.inp
*Include, input=.\MAT\NonlinRebar\MaterialParametersAnnulusRegionC3L4L5_Fibers.inp
*Material, name=Mat-AF-C4_Fibers
*Density
*Include, input=.\MAT\NonlinRebar\MaterialDensity.inp
*Include, input=.\MAT\NonlinRebar\MaterialParametersAnnulusRegionC4L4L5_Fibers.inp
*Material, name=Mat-AF-C5_Fibers
*Density
*Include, input=.\MAT\NonlinRebar\MaterialDensity.inp
*Include, input=.\MAT\NonlinRebar\MaterialParametersAnnulusRegionC5L4L5_Fibers.inp
*Material, name=Mat-AF-C6_Fibers
*Density
*Include, input=.\MAT\NonlinRebar\MaterialDensity.inp
*Include, input=.\MAT\NonlinRebar\MaterialParametersAnnulusRegionC6L4L5_Fibers.inp
*Material, name=Mat-AF-C7_Fibers
*Density
*Include, input=.\MAT\NonlinRebar\MaterialDensity.inp
*Include, input=.\MAT\NonlinRebar\MaterialParametersAnnulusRegionC7L4L5_Fibers.inp
*Material, name=Mat-AF-C8_Fibers
*Density
*Include, input=.\MAT\NonlinRebar\MaterialDensity.inp
*Include, input=.\MAT\NonlinRebar\MaterialParametersAnnulusRegionC8L4L5_Fibers.inp
*Material, name=Mat-AF-C9_Fibers
*Density
*Include, input=.\MAT\NonlinRebar\MaterialDensity.inp
*Include, input=.\MAT\NonlinRebar\MaterialParametersAnnulusRegionC9L4L5_Fibers.inp
*Material, name=Mat-AF-C10_Fibers
*Density
*Include, input=.\MAT\NonlinRebar\MaterialDensity.inp
*Include, input=.\MAT\NonlinRebar\MaterialParametersAnnulusRegionC10L4L5_Fibers.inp
*Material, name=Mat-AF-D1_Fibers
*Density
*Include, input=.\MAT\NonlinRebar\MaterialDensity.inp
*Include, input=.\MAT\NonlinRebar\MaterialParametersAnnulusRegionD1L4L5_Fibers.inp
*Material, name=Mat-AF-D2_Fibers
*Density
*Include, input=.\MAT\NonlinRebar\MaterialDensity.inp
*Include, input=.\MAT\NonlinRebar\MaterialParametersAnnulusRegionD2L4L5_Fibers.inp
*Material, name=Mat-AF-D3_Fibers
*Density
*Include, input=.\MAT\NonlinRebar\MaterialDensity.inp
*Include, input=.\MAT\NonlinRebar\MaterialParametersAnnulusRegionD3L4L5_Fibers.inp
*Material, name=Mat-AF-D4_Fibers
*Density
*Include, input=.\MAT\NonlinRebar\MaterialDensity.inp
*Include, input=.\MAT\NonlinRebar\MaterialParametersAnnulusRegionD4L4L5_Fibers.inp
*Material, name=Mat-AF-D5_Fibers
*Density
*Include, input=.\MAT\NonlinRebar\MaterialDensity.inp
*Include, input=.\MAT\NonlinRebar\MaterialParametersAnnulusRegionD5L4L5_Fibers.inp
*Material, name=Mat-AF-D6_Fibers
*Density
*Include, input=.\MAT\NonlinRebar\MaterialDensity.inp
*Include, input=.\MAT\NonlinRebar\MaterialParametersAnnulusRegionD6L4L5_Fibers.inp
*Material, name=Mat-AF-D7_Fibers
*Density
*Include, input=.\MAT\NonlinRebar\MaterialDensity.inp
*Include, input=.\MAT\NonlinRebar\MaterialParametersAnnulusRegionD7L4L5_Fibers.inp
*Material, name=Mat-AF-D8_Fibers
*Density
*Include, input=.\MAT\NonlinRebar\MaterialDensity.inp
*Include, input=.\MAT\NonlinRebar\MaterialParametersAnnulusRegionD8L4L5_Fibers.inp
*Material, name=Mat-AF-D9_Fibers
*Density
*Include, input=.\MAT\NonlinRebar\MaterialDensity.inp
*Include, input=.\MAT\NonlinRebar\MaterialParametersAnnulusRegionD9L4L5_Fibers.inp
*Material, name=Mat-AF-D10_Fibers
*Density
*Include, input=.\MAT\NonlinRebar\MaterialDensity.inp
*Include, input=.\MAT\NonlinRebar\MaterialParametersAnnulusRegionD10L4L5_Fibers.inp
*Material, name=Mat-AF-E1_Fibers
*Density
*Include, input=.\MAT\NonlinRebar\MaterialDensity.inp
*Include, input=.\MAT\NonlinRebar\MaterialParametersAnnulusRegionE1L4L5_Fibers.inp
*Material, name=Mat-AF-E2_Fibers
*Density
*Include, input=.\MAT\NonlinRebar\MaterialDensity.inp
*Include, input=.\MAT\NonlinRebar\MaterialParametersAnnulusRegionE2L4L5_Fibers.inp
*Material, name=Mat-AF-E3_Fibers
*Density
*Include, input=.\MAT\NonlinRebar\MaterialDensity.inp
*Include, input=.\MAT\NonlinRebar\MaterialParametersAnnulusRegionE3L4L5_Fibers.inp
*Material, name=Mat-AF-E4_Fibers
*Density
*Include, input=.\MAT\NonlinRebar\MaterialDensity.inp
*Include, input=.\MAT\NonlinRebar\MaterialParametersAnnulusRegionE4L4L5_Fibers.inp
*Material, name=Mat-AF-E5_Fibers
*Density
*Include, input=.\MAT\NonlinRebar\MaterialDensity.inp
*Include, input=.\MAT\NonlinRebar\MaterialParametersAnnulusRegionE5L4L5_Fibers.inp
*Material, name=Mat-AF-E6_Fibers
*Density
*Include, input=.\MAT\NonlinRebar\MaterialDensity.inp
*Include, input=.\MAT\NonlinRebar\MaterialParametersAnnulusRegionE6L4L5_Fibers.inp
*Material, name=Mat-AF-E7_Fibers
*Density
*Include, input=.\MAT\NonlinRebar\MaterialDensity.inp
*Include, input=.\MAT\NonlinRebar\MaterialParametersAnnulusRegionE7L4L5_Fibers.inp
*Material, name=Mat-AF-E8_Fibers
*Density
*Include, input=.\MAT\NonlinRebar\MaterialDensity.inp
*Include, input=.\MAT\NonlinRebar\MaterialParametersAnnulusRegionE8L4L5_Fibers.inp
*Material, name=Mat-AF-E9_Fibers
*Density
*Include, input=.\MAT\NonlinRebar\MaterialDensity.inp
*Include, input=.\MAT\NonlinRebar\MaterialParametersAnnulusRegionE9L4L5_Fibers.inp
*Material, name=Mat-AF-E10_Fibers
*Density
*Include, input=.\MAT\NonlinRebar\MaterialDensity.inp
*Include, input=.\MAT\NonlinRebar\MaterialParametersAnnulusRegionE10L4L5_Fibers.inp
*Material, name=Mat-Annulus
*Density
*Include, input=.\MAT\NonlinRebar\MaterialDensity.inp
*Hyperelastic, mooney-rivlin
*Include, input=.\MAT\NonlinRebar\MaterialParametersAnnulusL4L5.inp
*Material, name=Fiber-Membrane
*Density
*Include, input=.\MAT\NonlinRebar\MaterialDensity.inp
*Include, input=.\MAT\NonlinRebar\MaterialParametersFiberMembrane.inp
*Material, name=Mat-Nucleus
*Density
1.0e-09,
*Hyperelastic, mooney-rivlin
*Include, input=.\MAT\NonlinRebar\MaterialParametersNucleusL4L5.inp
** ----------------------------------------------------------------
**
** STEP: Step-1
**
*Step, name=Step-1, nlgeom=YES, inc=10000
*Static
0.05, 1., 1e-04, 1.
**
** BOUNDARY CONDITIONS
**
** Name: BC-1 Type: Symmetry/Antisymmetry/Encastre
*Boundary
RP-Encastre, ENCASTRE
**
** LOADS
**
** Name: Moment   Type: Moment
*Cload
RP-Load, 4, 5000
**
** OUTPUT REQUESTS
**
*Restart, write, frequency=0
**
** FIELD OUTPUT: F-Output-1
**
*Output, field
*Node Output
U,
*Element Output, directions=YES
PRESSONLY,
*Element Output, rebar, directions=YES
RBANG, RBFOR, RBROT
**
** HISTORY OUTPUT: H-Output-1
**
*Output, history
*Node Output, nset=RP-Load
UR,
*Element Output, elset=NP-Center
PRESS,
*End Step
